OpenVSP model (file version 5), 4 components.
Geometry view with OpenVSP parameter names; values to 6 digits, angles in degrees, lengths in the model's unit.
Overall bounding box: X_Min=0 X_Len=3 Y_Min=-8.33333 Y_Len=16.6667 Z_Min=-0.150087 Z_Len=0.300174

Wing "WingGeom"
  location (X Y Z) 0 0 0, rotation 0 0 0
  symmetric about XZ
  bounding box size 3 16.6667 0.300174
  totals: TotalSpan=16.6667 TotalProjectedSpan=16.6667 TotalChord=3 TotalArea=50 TotalAR=5.55556
  root: chord 3, twist 0, NACA 4-series Camber=0 CamberLoc=0.2 ThickChord=0.1
  sections:
    n  Span     Root_Chord  Tip_Chord  Area  Sweep  Sweep_Location  Dihedral  Twist  Twist_Location  tip airfoil
    1  8.33333  3           3          25    0      0               0         0      0.25            as above

Wing "WingGeom"
  location (X Y Z) 0 0 0, rotation 0 0 0
  symmetric about XZ
  bounding box size 3 16.6667 0.300174
  totals: TotalSpan=16.6667 TotalProjectedSpan=16.6667 TotalChord=3 TotalArea=50 TotalAR=5.55556
  root: chord 3, twist 0, NACA 4-series Camber=0 CamberLoc=0.2 ThickChord=0.1
  sections:
    n  Span     Root_Chord  Tip_Chord  Area  Sweep  Sweep_Location  Dihedral  Twist  Twist_Location  tip airfoil
    1  8.33333  3           3          25    0      0               0         0      0.25            as above

Wing "WingGeom"
  location (X Y Z) 0 0 0, rotation 0 0 0
  symmetric about XZ
  bounding box size 3 16.6667 0.300174
  totals: TotalSpan=16.6667 TotalProjectedSpan=16.6667 TotalChord=3 TotalArea=50 TotalAR=5.55556
  root: chord 3, twist 0, NACA 4-series Camber=0 CamberLoc=0.2 ThickChord=0.1
  sections:
    n  Span     Root_Chord  Tip_Chord  Area  Sweep  Sweep_Location  Dihedral  Twist  Twist_Location  tip airfoil
    1  8.33333  3           3          25    0      0               0         0      0.25            as above

Wing "WingGeom"
  location (X Y Z) 0 0 0, rotation 0 0 0
  symmetric about XZ
  bounding box size 3 16.6667 0.300174
  totals: TotalSpan=16.6667 TotalProjectedSpan=16.6667 TotalChord=3 TotalArea=50 TotalAR=5.55556
  root: chord 3, twist 0, NACA 4-series Camber=0 CamberLoc=0.2 ThickChord=0.1
  sections:
    n  Span     Root_Chord  Tip_Chord  Area  Sweep  Sweep_Location  Dihedral  Twist  Twist_Location  tip airfoil
    1  8.33333  3           3          25    0      0               0         0      0.25            as above
