OpenVSP model (file version 5), 12 components.
Geometry view with OpenVSP parameter names; values to 6 digits, angles in degrees, lengths in the model's unit.
Overall bounding box: X_Min=0 X_Len=10 Y_Min=-6.7082 Y_Len=13.4164 Z_Min=-0.666667 Z_Len=1.33333

Pod "PodGeom"
  location (X Y Z) 0 0 0, rotation 0 0 0
  bounding box size 10 1.33333 1.33333
  Design: FineRatio=15 Length=10

Wing "WingGeom"
  location (X Y Z) 2.5 0 0, rotation 0 0 0
  symmetric about XZ
  bounding box size 4.61834 13.4164 0.298315
  totals: TotalSpan=13.4164 TotalProjectedSpan=13.4164 TotalChord=1.86339 TotalArea=25 TotalAR=7.2
  root: chord 2.98142, twist 0, NACA 4-series Camber=0 CamberLoc=0.2 ThickChord=0.1
  sections:
    n  Span    Root_Chord  Tip_Chord  Area  Sweep  Sweep_Location  Dihedral  Twist  Twist_Location  tip airfoil
    1  6.7082  2.98142     0.745356   12.5  30     0               0         0      0.25            as above
  SS_Control "SS_CONT_0": UStart=0.4 UEnd=0.6 Length_C_Start=0.25 Length_C_End=0.25 Length_Start=0.633553 Length_End=0.298142 LE_Flag=0 Surf_Type=2

Pod "PodGeom"
  location (X Y Z) 0 0 0, rotation 0 0 0
  bounding box size 10 1.33333 1.33333
  Design: FineRatio=15 Length=10

Wing "WingGeom"
  location (X Y Z) 2.5 0 0, rotation 0 0 0
  symmetric about XZ
  bounding box size 4.61834 13.4164 0.298315
  totals: TotalSpan=13.4164 TotalProjectedSpan=13.4164 TotalChord=1.86339 TotalArea=25 TotalAR=7.2
  root: chord 2.98142, twist 0, NACA 4-series Camber=0 CamberLoc=0.2 ThickChord=0.1
  sections:
    n  Span    Root_Chord  Tip_Chord  Area  Sweep  Sweep_Location  Dihedral  Twist  Twist_Location  tip airfoil
    1  6.7082  2.98142     0.745356   12.5  30     0               0         0      0.25            as above
  SS_Control "SS_CONT_0": UStart=0.4 UEnd=0.6 Length_C_Start=0.25 Length_C_End=0.25 Length_Start=0.633553 Length_End=0.298142 LE_Flag=0 Surf_Type=2

Pod "PodGeom"
  location (X Y Z) 0 0 0, rotation 0 0 0
  bounding box size 10 1.33333 1.33333
  Design: FineRatio=15 Length=10

Wing "WingGeom"
  location (X Y Z) 2.5 0 0, rotation 0 0 0
  symmetric about XZ
  bounding box size 4.61834 13.4164 0.298315
  totals: TotalSpan=13.4164 TotalProjectedSpan=13.4164 TotalChord=1.86339 TotalArea=25 TotalAR=7.2
  root: chord 2.98142, twist 0, NACA 4-series Camber=0 CamberLoc=0.2 ThickChord=0.1
  sections:
    n  Span    Root_Chord  Tip_Chord  Area  Sweep  Sweep_Location  Dihedral  Twist  Twist_Location  tip airfoil
    1  6.7082  2.98142     0.745356   12.5  30     0               0         0      0.25            as above
  SS_Control "SS_CONT_0": UStart=0.4 UEnd=0.6 Length_C_Start=0.25 Length_C_End=0.25 Length_Start=0.633553 Length_End=0.298142 LE_Flag=0 Surf_Type=2

Pod "PodGeom"
  location (X Y Z) 0 0 0, rotation 0 0 0
  bounding box size 10 1.33333 1.33333
  Design: FineRatio=15 Length=10

Wing "WingGeom"
  location (X Y Z) 2.5 0 0, rotation 0 0 0
  symmetric about XZ
  bounding box size 4.61834 13.4164 0.298315
  totals: TotalSpan=13.4164 TotalProjectedSpan=13.4164 TotalChord=1.86339 TotalArea=25 TotalAR=7.2
  root: chord 2.98142, twist 0, NACA 4-series Camber=0 CamberLoc=0.2 ThickChord=0.1
  sections:
    n  Span    Root_Chord  Tip_Chord  Area  Sweep  Sweep_Location  Dihedral  Twist  Twist_Location  tip airfoil
    1  6.7082  2.98142     0.745356   12.5  30     0               0         0      0.25            as above
  SS_Control "SS_CONT_0": UStart=0.4 UEnd=0.6 Length_C_Start=0.25 Length_C_End=0.25 Length_Start=0.633553 Length_End=0.298142 LE_Flag=0 Surf_Type=2

Pod "PodGeom"
  location (X Y Z) 0 0 0, rotation 0 0 0
  bounding box size 10 1.33333 1.33333
  Design: FineRatio=15 Length=10

Wing "WingGeom"
  location (X Y Z) 2.5 0 0, rotation 0 0 0
  symmetric about XZ
  bounding box size 4.61834 13.4164 0.298315
  totals: TotalSpan=13.4164 TotalProjectedSpan=13.4164 TotalChord=1.86339 TotalArea=25 TotalAR=7.2
  root: chord 2.98142, twist 0, NACA 4-series Camber=0 CamberLoc=0.2 ThickChord=0.1
  sections:
    n  Span    Root_Chord  Tip_Chord  Area  Sweep  Sweep_Location  Dihedral  Twist  Twist_Location  tip airfoil
    1  6.7082  2.98142     0.745356   12.5  30     0               0         0      0.25            as above
  SS_Control "SS_CONT_0": UStart=0.4 UEnd=0.6 Length_C_Start=0.25 Length_C_End=0.25 Length_Start=0.633553 Length_End=0.298142 LE_Flag=0 Surf_Type=2

Pod "PodGeom"
  location (X Y Z) 0 0 0, rotation 0 0 0
  bounding box size 10 1.33333 1.33333
  Design: FineRatio=15 Length=10

Wing "WingGeom"
  location (X Y Z) 2.5 0 0, rotation 0 0 0
  symmetric about XZ
  bounding box size 4.61834 13.4164 0.298315
  totals: TotalSpan=13.4164 TotalProjectedSpan=13.4164 TotalChord=1.86339 TotalArea=25 TotalAR=7.2
  root: chord 2.98142, twist 0, NACA 4-series Camber=0 CamberLoc=0.2 ThickChord=0.1
  sections:
    n  Span    Root_Chord  Tip_Chord  Area  Sweep  Sweep_Location  Dihedral  Twist  Twist_Location  tip airfoil
    1  6.7082  2.98142     0.745356   12.5  30     0               0         0      0.25            as above
  SS_Control "SS_CONT_0": UStart=0.4 UEnd=0.6 Length_C_Start=0.25 Length_C_End=0.25 Length_Start=0.633553 Length_End=0.298142 LE_Flag=0 Surf_Type=2
